# Задание №2
# Вариант 28
# Корытов Павел, 6304
# Исходные данные:
T_см := 480 min
# - время смен
# - время перерыва
# - сменное задание
# - коэффициент сменности
T_пер := 20 min
table  # each column defines a variable
    i | t_оп (min)
    1 | 3.2
    2 | 6.9
    3 | 9.2
    4 | 11.7
    5 | 4.7
    6 | 6.5
    7 | 10.2
    8 | 5.6
    9 | 4.4
    10 | 0.6
end table
N_см := 115 ¤
K_см := 1
# Расчёт:
# 1. Фонд времени:
Ф_эф := (T_см - T_пер)*K_см = 460 min
# 2. Такт выпуска:
τ_v := Ф_эф/N_см = 4 min/¤
# 3. Этап предварительной синхронизации
N := length(t_оп) = 10
C'_R := t_оп/(τ_v*¤) = [0.8; 1.725; 2.3; 2.925; 1.175; 1.625; 2.55; 1.4; 1.1; 0.15]
# 4. Округление
rnd''(x) :=
    if (x/floor(x) ≤ 1.1)
        floor(x)
    else
        ceil(x)
rnd'(x) :=
    if floor(x) > 0
        rnd''(x)
    else
        ceil(x)
rnd(x) := {
    for i ∈ 0 .. length(x) - 1
        r[i] ← rnd'(x[i])
}*{
    return r
}
C' := rnd(C'_R) = [1; 2; 3; 3; 2; 2; 3; 2; 1; 1]
5.
sum(C'[i], i = 0 .. N - 1) = 20
6.
η' := C'_R/C' = [0.8; 0.8625; 0.766667; 0.975; 0.5875; 0.8125; 0.85; 0.7; 1.1; 0.15]
# 7.
check(x) := {
    for i ∈ 0 .. length(x) - 1
        if x[i] < 0.9
            return "False"
}*{
    return "True"
}
check(η') = "False"
# Оборудование работает неэффективно. Необходимо выполнить окончательную синхронизацию
# 8. Объединяем смежные операции, чтобы повысить эффективность
# Для поиска решения написана программа на Python3. Лучшее решение, представленное программой:
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# Программа перебрала все возможные варианты склеивания массива из N чисел и нашла тот, который удовлетворяет условию эффективной работы и при этом содержит наименьшее число склеиваний.
# Если ограничить число склеиваний тремя, нужно признать, что эффективно организовать ОНПЛ невозможно
t_оп = [3.2; 6.9; 9.2; 11.7; 4.7; 6.5; 10.2; 5.6; 4.4; 0.6] min
t'_оп := [19.3; 11.7; 11.2; 20.8] min
# 9. Проверка - повторение операций 3..6 для нового t
C_R := t'_оп/(τ_v*¤) = [4.825; 2.925; 2.8; 5.2]
C := rnd(C_R) = [5; 3; 3; 5]
η := C_R/C = [0.965; 0.975; 0.933333; 1.04]
check(η) = "True"
# 10. ОНПЛ эффективно
11.
t_оп.ок(t'_оп, η, C) := {
    for i ∈ 0 .. length(t'_оп) - 1
        if η[i] > 1
            r[i] ← τ_v*C[i]*¤
        else
            r[i] ← t'_оп[i]
}*{
    return r
}
t_оп.ок(t'_оп, η, C) = [19.3; 11.7; 11.2; 20] min
